*Heading
** Job name: C3D10 Model name: Model-1
** Generated by: Abaqus/CAE 2021
*Preprint, echo=NO, model=NO, history=NO, contact=NO
**
** PARTS
**
*Part, name=Part-1
*Node
      1,         -20.,         -20.,         100.
      2,         -20.,          20.,         100.
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*Element, type=C3D10
   1,   771,   772,   773,   774,  1873,  1872,  1871,  1875,  1874,  1876
   2,   771,   772,   775,   776,  1873,  1878,  1877,  1880,  1879,  1881
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*Nset, nset=AllSet, generate
     1,  13255,      1
*Elset, elset=AllSet, generate
    1,  8748,     1
** Section: Section-1
*Solid Section, elset=AllSet, material=Material-1
,
*End Part
**
**
** ASSEMBLY
**
*Assembly, name=Assembly
**
*Instance, name=Part-1-1, part=Part-1
*End Instance
**
*Node
      1,           0.,           0.,         100.
*Nset, nset=RP
 1,
*Nset, nset=bottom, instance=Part-1-1
     3,     4,     6,     7,    35,    36
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*Elset, elset=bottom, instance=Part-1-1
  633, 1677, 1696, 2486, 2513, 2575
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*Nset, nset=_PickedSet8, internal
 1,
*Elset, elset=_head_S3, internal, instance=Part-1-1
 1706, 1716, 1717, 1772, 1789, 1800
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*Elset, elset=_head_S1, internal, instance=Part-1-1
 1924, 5226, 8571
*Elset, elset=_head_S2, internal, instance=Part-1-1
 5063,
*Surface, type=ELEMENT, name=head
_head_S3, S3
_head_S1, S1
_head_S2, S2
** Constraint: Constraint-1
*Coupling, constraint name=Constraint-1, ref node=RP, surface=head
*Kinematic
*End Assembly
**
** MATERIALS
**
*Material, name=Material-1
*Hyperelastic, neo hooke
 0.24, 0.4
**
** BOUNDARY CONDITIONS
**
** Name: BC-1 Type: Displacement/Rotation
*Boundary
bottom, 1, 1
bottom, 2, 2
bottom, 3, 3
bottom, 4, 4
bottom, 5, 5
bottom, 6, 6
** ----------------------------------------------------------------
**
** STEP: Step-1
**
*Step, name=Step-1, nlgeom=YES
*Static
1., 1., 1e-05, 1.
**
** LOADS
**
** Name: Load-1   Type: Concentrated force
*Cload
_PickedSet8, 1, 30.
**
** OUTPUT REQUESTS
**
*Restart, write, frequency=0
**
** FIELD OUTPUT: F-Output-1
**
*Output, field, variable=PRESELECT
**
** HISTORY OUTPUT: H-Output-1
**
*Output, history, variable=PRESELECT
*End Step
