*Heading
** Job name: TopOptRun Model name: Model-1
** Generated by: Abaqus/CAE 2021
*Preprint, echo=NO, model=NO, history=NO, contact=NO
**
** PARTS
**
*Part, name=final_model
*Node
      1,   18.2280273,   8.85463047,          70.
      2,  -18.2280273,  -8.85463047,          70.
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*Element, type=C3D4
    1, 11169, 11170, 11171, 11172
    2, 11173, 11169, 11174, 11175
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*Nset, nset=surface_0_All
    1,    2,    3,    4,   17,   18
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*Elset, elset=surface_0_All
    25,    89,   298,   327,   344,   352
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*Nset, nset=surface_0_Head
   1,   2,  17,  18,  19,  20
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*Elset, elset=surface_0_Head
   377,  2085,  2555,  3517,  3906,  5727
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*Nset, nset=surface_0_Bottom
    3,    4,  213,  214,  215,  216
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*Elset, elset=surface_0_Bottom
   327,   344,   936,  1236,  1458,  1499
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*Nset, nset=surface_0_Lateral
    1,    2,    3,    4,   17,   18
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*Elset, elset=surface_0_Lateral
    25,    89,   298,   352,   369,   371
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*Nset, nset=surface_1_All
    13,    14,    15,    16,   502,   503
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*Elset, elset=surface_1_All
   144,   291,   449,   474,   504,   520
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*Nset, nset=surface_1_Head
   13,   14,  502,  503,  504,  505
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*Elset, elset=surface_1_Head
  2331,  2333,  3908,  4830,  4840, 11558
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*Nset, nset=surface_2_All
    9,   10,   11,   12,  359,  360
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*Elset, elset=surface_2_All
    54,    75,   154,   210,   271,   272
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*Nset, nset=surface_3_All
    5,    6,    7,    8,  265,  266
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*Elset, elset=surface_3_All
   262,  1894,  2471,  3095,  3229,  3916
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*Elset, elset=RubberSet, generate
     1,  74412,      1
*Elset, elset=_surface_0_All_S3, internal
    89,   327,   344,   352,   377,   427
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*Elset, elset=_surface_0_All_S4, internal
    25,   369,   371,   377,   395,   406
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*Elset, elset=_surface_0_All_S2, internal
   298,  1299,  3388,  4041,  6286,  6834
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*Elset, elset=_surface_0_All_S1, internal
  1641,  1643,  2286,  2475,  2539,  2752
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*Surface, type=ELEMENT, name=surface_0_All
_surface_0_All_S3, S3
_surface_0_All_S4, S4
_surface_0_All_S2, S2
_surface_0_All_S1, S1
*Elset, elset=_surface_1_All_S2, internal
   291,   662,   667,   991,  1160,  2229
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*Elset, elset=_surface_1_All_S3, internal
   144,   449,   474,   520,   590,  1188
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*Elset, elset=_surface_1_All_S1, internal
   650,  3356,  3401,  4745,  5527,  6040
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*Elset, elset=_surface_1_All_S4, internal
   504,   749,  1376,  2331,  3299,  3828
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*Surface, type=ELEMENT, name=surface_1_All
_surface_1_All_S2, S2
_surface_1_All_S3, S3
_surface_1_All_S4, S4
_surface_1_All_S1, S1
*Elset, elset=_surface_2_All_S4, internal
   154,   271,   272,   353,   818,  1128
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*Elset, elset=_surface_2_All_S2, internal
    54,   624,   626,   839,  5584,  5847
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*Elset, elset=_surface_2_All_S3, internal
    75,   210,   572,  1056,  1293,  1959
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*Elset, elset=_surface_2_All_S1, internal
   896,  2518,  3037,  3255,  4276,  4676
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*Surface, type=ELEMENT, name=surface_2_All
_surface_2_All_S4, S4
_surface_2_All_S2, S2
_surface_2_All_S3, S3
_surface_2_All_S1, S1
*Elset, elset=_surface_3_All_S3, internal
   262,  1894,  2471, 11751, 12314, 13132
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*Elset, elset=_surface_3_All_S1, internal
  3095,  3916,  4191,  6365,  9387, 10386
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*Elset, elset=_surface_3_All_S4, internal
  3229,  4561,  9192, 15083, 24525, 28859
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*Elset, elset=_surface_3_All_S2, internal
 48946, 49178, 49293, 49324, 49425, 49429
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*Surface, type=ELEMENT, name=surface_3_All
_surface_3_All_S3, S3
_surface_3_All_S1, S1
_surface_3_All_S4, S4
_surface_3_All_S2, S2
** Section: Rubber
*Solid Section, elset=RubberSet, material=Rubber
,
*End Part
**
**
** ASSEMBLY
**
*Assembly, name=Assembly
**
*Instance, name=final_model-1, part=final_model
*End Instance
**
*Node
      1,           0.,           0.,          70.
*Nset, nset=_PickedSet18, internal
 1,
*Elset, elset=__PickedSurf17_S3, internal, instance=final_model-1
   377,  2085,  2555,  3517,  3906,  5727
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*Elset, elset=__PickedSurf17_S2, internal, instance=final_model-1
  6834, 12754, 15377, 15654, 15697, 16138, 16144, 16207, 16415, 16444, 18755, 19119, 20444, 35785, 36838
*Elset, elset=__PickedSurf17_S4, internal, instance=final_model-1
 11014, 12870, 12883, 14106, 15167, 15234
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*Elset, elset=__PickedSurf17_S1, internal, instance=final_model-1
 15934, 19970, 42219, 51491, 57995, 69734
*Surface, type=ELEMENT, name=_PickedSurf17, internal
__PickedSurf17_S3, S3
__PickedSurf17_S2, S2
__PickedSurf17_S4, S4
__PickedSurf17_S1, S1
** Constraint: Constraint-1
*Coupling, constraint name=Constraint-1, ref node=_PickedSet18, surface=_PickedSurf17
*Kinematic
*End Assembly
**
** MATERIALS
**
*Material, name=Rubber
*Density
 1.08e-09,
*Hyperelastic, neo hooke
 0.241, 0.416667,       0.,       0.,       0.,       0.
**
** INTERACTION PROPERTIES
**
*Surface Interaction, name=IntProp-1
1.,
*Surface Behavior, pressure-overclosure=HARD
**
** BOUNDARY CONDITIONS
**
** Name: BC-1 Type: Displacement/Rotation
*Boundary
final_model-1.surface_0_Bottom, 1, 1
final_model-1.surface_0_Bottom, 2, 2
final_model-1.surface_0_Bottom, 3, 3
final_model-1.surface_0_Bottom, 4, 4
final_model-1.surface_0_Bottom, 5, 5
final_model-1.surface_0_Bottom, 6, 6
**
** INTERACTIONS
**
** Interaction: Int-1
*Contact Pair, interaction=IntProp-1, type=SURFACE TO SURFACE
final_model-1.surface_0_All,
** Interaction: Int-2
*Contact Pair, interaction=IntProp-1, type=SURFACE TO SURFACE
final_model-1.surface_1_All,
** Interaction: Int-3
*Contact Pair, interaction=IntProp-1, type=SURFACE TO SURFACE
final_model-1.surface_2_All,
** Interaction: Int-4
*Contact Pair, interaction=IntProp-1, type=SURFACE TO SURFACE
final_model-1.surface_3_All,
** ----------------------------------------------------------------
**
** STEP: Step-1
**
*Step, name=Step-1, nlgeom=YES
*Static
1., 1., 1e-05, 1.
**
** LOADS
**
** Name: Load-1   Type: Pressure
*Dsload
final_model-1.surface_1_All, P, 0.08
**
** OUTPUT REQUESTS
**
*Restart, write, frequency=0
**
** FIELD OUTPUT: F-Output-1
**
*Output, field, variable=PRESELECT
**
** HISTORY OUTPUT: H-Output-1
**
*Output, history, variable=PRESELECT
*End Step
