*Heading
** Job name: rec Model name: rec
** Generated by: Abaqus/CAE 2021
*Preprint, echo=NO, model=NO, history=NO, contact=NO
**
** PARTS
**
*Part, name=rec
*Node
      1,         -75.,          -4.,          90.
      2,         -75.,           4.,          90.
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*Element, type=C3D4
   1, 149, 363, 364, 365
   2, 366, 367, 368, 369
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*Nset, nset=Set-1, generate
   1,  700,    1
*Elset, elset=Set-1, generate
    1,  2994,     1
*Elset, elset=_contact_S3, internal
   16,   24,   38,   39,   40,   46
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*Elset, elset=_contact_S4, internal
  357, 1695, 2248, 2443, 2877, 2962
*Elset, elset=_contact_S1, internal
 1770,
*Elset, elset=_contact_S2, internal
  503, 1758
*Surface, type=ELEMENT, name=contact
_contact_S3, S3
_contact_S4, S4
_contact_S2, S2
_contact_S1, S1
** Section: Section-1
*Solid Section, elset=Set-1, material=Material-1
,
*End Part
**
**
** ASSEMBLY
**
*Assembly, name=Assembly
**
*Instance, name=rec-1, part=rec
*End Instance
**
*End Assembly
**
** MATERIALS
**
*Material, name=Material-1
*Hyperelastic, neo hooke
 0.24, 0.4
